// SBML level 2 version 1

function Mass_Action_0_1(k1)
  k1;
end

function Mass_Action_1_1(k1, S1)
  k1*S1;
end

function Mass_Action_2_1(k1, S1, S2)
  k1*S1*S2;
end

function Michaelis_Menten_1(M1, J1, k1, S1)
  k1*M1*S1/(J1 + S1);
end

function BB_1(A1, A2, A3, A4)
  A2 - A1 + A3*A2 + A4*A1;
end

function GK_1(A1, A2, A3, A4)
  2*A4*A1/(BB_1(A1, A2, A3, A4) + sqrt(BB_1(A1, A2, A3, A4)^2 - 4*(A2 - A1)*A4*A1));
end

model main()

  // Compartments:
  compartment cell_1 = 1;
  compartment cytoplasm_1 in cell_1 = 0.8;
  compartment nucleus_1 in cell_1 = 0.2;

  // Species:
  species MASS_1 in cell_1 = 1.134675;
  species CLN2_1 in cell_1 = 0.1956082;
  species CLB5_1 in cell_1 = 0.07678942;
  species CLB2_1 in cell_1 = 0.06943065;
  species SIC1_1 in cell_1 = 0.03681761;
  species SIC1P_1 in cell_1 = 0.005189817;
  species C2_1 in cell_1 = 0.1973412;
  species C5_1 in cell_1 = 0.07965494;
  species C2P_1 in cell_1 = 0.01280831;
  species C5P_1 in cell_1 = 0.004767459;
  species CDC6_1 in cell_1 = 0.1339682;
  species CDC6P_1 in cell_1 = 0.03563149;
  species F2_1 in cell_1 = 0.117542;
  species F5_1 in cell_1 = 0.0001048095;
  species F2P_1 in cell_1 = 0.02807671;
  species F5P_1 in cell_1 = 2.140232e-5;
  species SWI5_1 in cell_1 = 0.8034391;
  species SWI5P_1 in cell_1 = 0.01707762;
  species IE_1 in cell_1 = 0.5161515;
  species IEP_1 in cell_1 = 0.4838485;
  species CDC20i_1 in cell_1 = 0.7875925;
  species CDC20_1 in cell_1 = 0.7060062;
  species CDH1_1 in cell_1 = 0.9960054;
  species CDH1i_1 in cell_1 = 0.003994637;
  species CDC14_1 in cell_1 = 0.6856954;
  species NET1_1 in cell_1 = 0.006568189;
  species RENT_1 in cell_1 = 0.6434163;
  species NET1P_1 in cell_1 = 1.279127;
  species RENTP_1 in cell_1 = 0.8708883;
  species TEM1GDP_1 in cell_1 = 0.1232531;
  species TEM1GTP_1 in cell_1 = 0.8767469;
  species CDC15i_1 in cell_1 = 0.3475653;
  species CDC15_1 in cell_1 = 0.6524347;
  species PDS1_1 in cell_1 = 0.01185849;
  species ESP1_1 in cell_1 = 0.5205421;
  species PE_1 in cell_1 = 0.4794579;
  species ORI_1 in cell_1 = 0.02914121;
  species BUD_1 in cell_1 = 0.01541102;
  species SPN_1 in cell_1 = 0.03257956;
  species MAD2_1 in cell_1 = 0.01;
  species LTE1_1 in cell_1 = 0.1;
  species BUB2_1 in cell_1 = 0.2;
  species D_1 in cell_1;
  species F_1 in cell_1;
  species CLB2T_1 in cell_1;
  species CLB5T_1 in cell_1;
  species CDC14T_1 in cell_1;
  species NET1T_1 in cell_1;
  species SIC1T_1 in cell_1;
  species CDC6T_1 in cell_1;
  species CKIT_1 in cell_1;
  species MCM1_1 in cell_1;
  species Vacln3_1 in cell_1;
  species YDJ1_1 in cell_1;
  species SSA1_1 in cell_1;
  species BCK2_1 in cell_1;
  // Nuclear Cln3
  species CLN3_1 in cell_1;
  species Vdb2_1 in cell_1;
  species Vdb5_2 in cell_1;
  species Vkpc1_1 in cell_1;
  species Vppc1_1 in cell_1;
  species Vkpf6_1 in cell_1;
  species Vppf6_1 in cell_1;
  species Vd2c1_1 in cell_1;
  species Vd2f6_1 in cell_1;
  species Vaiep_1 in cell_1;
  species Vd20_1 in cell_1;
  species Vacdh_1 in cell_1;
  species Vicdh_1 in cell_1;
  species Vkpnet_1 in cell_1;
  species PP2A_1 in cell_1;
  species Vppnet_1 in cell_1;
  species Vdpds_1 in cell_1;
  species Vpn_1 in cell_1;
  species Vpcln_1 in cell_1;
  species Vppcln_1 in cell_1;
  species Vpnm_1 in cell_1;
  species Vpclnm_1 in cell_1;
  species Vpnw_1 in cell_1;
  species Vpclnw_1 in cell_1;
  species Vpclb_1 in cell_1;
  species Vpp14_1 in cell_1;
  species Vpclb26_1 in cell_1;
  species Vppase_1 in cell_1;
  species SWI4_1 in nucleus_1 = 5.5;
  species SWI6_1 in nucleus_1 = 30;
  species WHI5_1 in nucleus_1 = 10;
  // dep sp
  species MBP1_1 in nucleus_1 = 5.5;
  // dep sp
  species PROM2_1 in nucleus_1 = 2;
  // dep sp
  species PROM5_1 in nucleus_1 = 2;
  species NRM1_1 in nucleus_1 = 0;
  species SWI4C_1 in cytoplasm_1 = 0;
  // dep sp
  species SWI4PC_1 in cytoplasm_1 = 0;
  species SWI4P_1 in nucleus_1 = 0;
  species SWI4B_1 in nucleus_1 = 0;
  species SWI4F_1 in nucleus_1 = 0;
  // new
  species W4B_1 in nucleus_1 = 0;
  species SBFF_1 in nucleus_1 = 0;
  species SBFF4P_1 in nucleus_1 = 0;
  species SBFF6P_1 in nucleus_1 = 0;
  species SBFF6PQ_1 in nucleus_1 = 0;
  species SBFF46P_1 in nucleus_1 = 0;
  species SBFF46PQ_1 in nucleus_1 = 0;
  species SBFB_1 in nucleus_1 = 0;
  species SBFB6P_1 in nucleus_1 = 0;
  species SBFB6PQ_1 in nucleus_1 = 0;
  species WSF_1 in nucleus_1 = 0;
  species WSF4P_1 in nucleus_1 = 0;
  species WSF5P_1 in nucleus_1 = 0;
  species WSF6P_1 in nucleus_1 = 0;
  species WSF6PQ_1 in nucleus_1 = 0;
  species WSF45P_1 in nucleus_1 = 0;
  species WSF46P_1 in nucleus_1 = 0;
  species WSF46PQ_1 in nucleus_1 = 0;
  species WSF56P_1 in nucleus_1 = 0;
  species WSB_1 in nucleus_1 = 0;
  species WSB5P_1 in nucleus_1 = 0;
  species WSB6P_1 in nucleus_1 = 0;
  species WSB6PQ_1 in nucleus_1 = 0;
  species WSB56P_1 in nucleus_1 = 0;
  species SWI6C_1 in cytoplasm_1 = 0;
  species SWI6QC_1 in cytoplasm_1 = 0;
  // dep sp
  species SWI6PQC_1 in cytoplasm_1 = 0;
  species SWI6P_1 in nucleus_1 = 0;
  species SWI6PQ_1 in nucleus_1 = 0;
  species MBFF_1 in nucleus_1 = 0;
  species MBFi_1 in nucleus_1 = 0;
  species MBFa_1 in nucleus_1 = 0;
  species MBFp_1 in nucleus_1 = 0;
  species MBFo_1 in nucleus_1 = 0;
  species MBFpo_1 in nucleus_1 = 0;
  // new-AUG29 2011
  species WMB_1 in nucleus_1 = 0;
  // dep sp
  species WHI5PC_1 in cytoplasm_1 = 0;
  species WHI5C_1 in cytoplasm_1 = 0;
  species WHI5PN_1 in nucleus_1 = 0;
  species SWI6CTOT_1 in cytoplasm_1;
  species SBFact_1 in nucleus_1;
  species MBFact_1 in nucleus_1;
  species SBFa1_1 in cell_1;
  species TCYCLE_1 in cell_1 = 0.7255727/cell_1;
  species ORIFLAG_1 in cell_1 = 1/cell_1;
  species Twhi5_1 in cell_1 = 0;
  species Mwhi5_1 in cell_1 = 0;
  species TBUD_1 in cell_1 = 0;
  species MBUD_1 in cell_1 = 0;
  species TORI_1 in cell_1 = 1000/cell_1;
  species UDNA_1 in cell_1 = 0;
  species REPDNA_1 in cell_1 = 0;
  species TSPN_1 in cell_1 = 0;
  species SPNALIGN_1 in cell_1 = 0;
  species SACOFF_1 in cell_1 = 0;
  species SWI4nucf_1 in cell_1;
  species WHI5nucf_1 in cell_1;
  species SWI6nucf_1 in cell_1;
  species WHI5cycf_1 in cell_1;
  species CLN310x_1 in cell_1;
  species MASSBIRTH_1 in cell_1 = 1.128607;
  species MitCat_1 in cell_1 = 0;
  species T0_1 in cell_1; T0_1 is "SWI6T";
  species T1_1 in cell_1; T1_1 is "MBP1T";
  species T2_1 in nucleus_1; T2_1 is "PROM5T";
  species T3_1 in cell_1; T3_1 is "WHI5T";
  species T4_1 in cell_1; T4_1 is "SWI4T";
  species T5_1 in nucleus_1; T5_1 is "PROM2T";
  species T6_1 in cell_1; T6_1 is "ESP1T";
  species T7_1 in cell_1; T7_1 is "CDC15T";
  species T8_1 in cell_1; T8_1 is "TEM1T";
  species T9_1 in cell_1; T9_1 is "IET";
  species T0_2;
  species T1_2;
  species T2_2;
  species T3_2;
  species T4_2;
  species T5_2;
  species T6_2;
  species T7_2;
  species T8_2;
  species T9_2;
  species SBFa2_1 in cell_1;
  species SBFa3_1 in cell_1;
  species SBFa4_1 in cell_1;
  species SBFa5_1 in cell_1;

  // Parameters:
  var mu_1;
  ksn2_1 = 0; ksn2_1 is "ksn2'";
  ksn2_2 = 0.38; ksn2_2 is "ksn2''";
  ksn2_3 = 0.3; ksn2_3 is "ksn2'''";
  kdn2_1 = 0.14;
  ksb5_1 = 2e-4; ksb5_1 is "ksb5'";
  ksb5_2 = 0.004; ksb5_2 is "ksb5''";
  ksb5_3 = 0.0325; ksb5_3 is "ksb5'''";
  kdb5_1 = 0.015; kdb5_1 is "kdb5'";
  kdb5_2 = 0.17; kdb5_2 is "kdb5''";
  ksb2_1 = 0.006; ksb2_1 is "ksb2'";
  ksb2_2 = 0.12; ksb2_2 is "ksb2''";
  kdb2_1 = 0.003; kdb2_1 is "kdb2'";
  kdb2_2 = 0.4; kdb2_2 is "kdb2''";
  kdb2_3 = 0.285; kdb2_3 is "kdb2'''";
  kamcm_1 = 1;
  kimcm_1 = 0.49;
  Jamcm_1 = 0.1;
  Jimcm_1 = 0.1;
  ksc1_1 = 0.0132; ksc1_1 is "ksc1'";
  ksc1_2 = 0.132; ksc1_2 is "ksc1''";
  kdc1_1 = 0.001;
  kd1c1_1 = 0.01;
  kd2c1_1 = 1;
  kd3c1_1 = 1;
  kasb2_1 = 50;
  kdib2_1 = 0.05;
  kasb5_1 = 30;
  kdib5_1 = 0.06;
  ksf6_1 = 0.02; ksf6_1 is "ksf6'";
  ksf6_2 = 0.2; ksf6_2 is "ksf6''";
  ksf6_3 = 0.004; ksf6_3 is "ksf6'''";
  kdf6_1 = 0.001;
  kd1f6_1 = 0.01;
  kd2f6_1 = 1;
  kd3f6_1 = 1;
  kasf2_1 = 15;
  kdif2_1 = 0.5;
  kasf5_1 = 0.015;
  kdif5_1 = 0.03;
  ec1n3_1 = 0;
  ec1k2_1 = 0;
  ec1n2_1 = 0.09;
  ec1b5_1 = 0.23;
  ec1b2_1 = 0.4;
  Jd2c1_1 = 0.05;
  kppc1_1 = 4;
  ef6n3_1 = 0;
  ef6k2_1 = 0;
  ef6n2_1 = 0.23;
  ef6b5_1 = 0.45;
  ef6b2_1 = 1.5;
  Jd2f6_1 = 0.05;
  kppf6_1 = 4;
  ksswi_1 = 0.005; ksswi_1 is "ksswi'";
  ksswi_2 = 0.08; ksswi_2 is "ksswi''";
  kdswi_1 = 0.08;
  kaswi_1 = 2;
  kiswi_1 = 0.1;
  kaiep_1 = 0.1;
  kiiep_1 = 0.15;
  Jaiep_1 = 0.1;
  Jiiep_1 = 0.1;
  ks20_1 = 0.006; ks20_1 is "ks20'";
  ks20_2 = 0.6; ks20_2 is "ks20''";
  kd20_1 = 0.255;
  kd20_2 = 0.05; kd20_2 is "kd20'";
  ka20_1 = 0.06; ka20_1 is "ka20'";
  ka20_2 = 0.15; ka20_2 is "ka20''";
  mad2h_1 = 8;
  mad2l_1 = 0.01;
  kscdh_1 = 0.01;
  kdcdh_1 = 0.01;
  kacdh_1 = 0.01; kacdh_1 is "kacdh'";
  kacdh_2 = 0.55; kacdh_2 is "kacdh''";
  kicdh_1 = 0.005; kicdh_1 is "kicdh'";
  kicdh_2 = 0.08; kicdh_2 is "kicdh''";
  eicdhn3_1 = 0;
  eicdhn2_1 = 0.22;
  eicdhb5_1 = 4.2;
  eicdhb2_1 = 0.72;
  Jacdh_1 = 0.03;
  Jicdh_1 = 0.032;
  ks14_1 = 0.22;
  kd14_1 = 0.1;
  ksnet_1 = 0.084;
  kdnet_1 = 0.03;
  kasrent_1 = 300;
  kdirent_1 = 1;
  kasrentp_1 = 1;
  kdirentp_1 = 1.6;
  kpnet_1 = 0.01; kpnet_1 is "kpnet'";
  kpnet_2 = 2.4; kpnet_2 is "kpnet''";
  kppnet_1 = 0.05; kppnet_1 is "kppnet'";
  kppnet_2 = 2.8; kppnet_2 is "kppnet''";
  PP2AT_1 = 1;
  ki_1 = 40;
  kpp_1 = 0.1;
  lte1h_1 = 1;
  lte1l_1 = 0.1;
  bub2h_1 = 1;
  bub2l_1 = 0.2;
  Jatem_1 = 0.1;
  Jitem_1 = 0.1;
  ka15_1 = 0.002; ka15_1 is "ka15'";
  ka15_2 = 1; ka15_2 is "ka15''";
  ka15_3 = 0.001; ka15_3 is "ka15'''";
  ki15_1 = 0.5;
  kspds_1 = 0.07; kspds_1 is "kspds'";
  kdpds_1 = 0.01; kdpds_1 is "kdpds'";
  kdpds_2 = 0.25; kdpds_2 is "kdpds''";
  kdpds_3 = 0.03; kdpds_3 is "kdpds'''";
  kasesp_1 = 50;
  kdiesp_1 = 0.5;
  ksori_1 = 1.5;
  kdori_1 = 0.06;
  eorib5_1 = 0.85;
  eorib2_1 = 0.45;
  ksbud_1 = 0.22;
  kdbud_1 = 0.018;
  ebudn2_1 = 0.3;
  ebudn3_1 = 0.3;
  ebudb5_1 = 0.6;
  ksspn_1 = 0.09;
  kdspn_1 = 0.06;
  Jspn_1 = 0.15;
  mdt_1 = 90;
  KEZ2_1 = 0.2;
  // Differ from NoProm Model
  KEZ_1 = 0.3;
  // SWI4-SWI6 formation
  kas46_1 = 30;
  kdi46_1 = 0.5;
  // WHI5-SBF formation
  kasws_1 = 30;
  kdiws_1 = 1;
  kdiwp_1 = 15;
  // WHI5-MBF formation
  kaswm_1 = 1.5;
  kdiwm_1 = 1;
  // SBF-PROMOTOR
  kasprom_1 = 50;
  kdiprom_1 = 1;
  // SWI4 dimer
  ksbs4_1 = 5;
  kdbs4_1 = 5;
  kasw4_1 = 0;
  kdiw4_1 = 1;
  ef4p_1 = 1;
  ef5p_1 = 1;
  ef6p_1 = 1;
  ef6q_1 = 1;
  epn3_1 = 1;
  epn2_1 = 0.085;
  epb5_1 = 0.072;
  epk2_1 = 0.6;
  N_1 = 5;
  Jpn_1 = 0.4;
  Vpnmax_1 = 2.7;
  kppcln_1 = 1;
  kppcln_2 = 0.5; kppcln_2 is "kppcln'";
  epn3m_1 = 1;
  epn2m_1 = 0.043;
  epb5m_1 = 0.17;
  epk2m_1 = 0.63;
  Vpmaxm_1 = 5.2;
  epn3w_1 = 1;
  epn2w_1 = 0.08;
  epb5w_1 = 0.075;
  epk2w_1 = 0.3;
  Vnmaxw_1 = 3;
  kasbf1_1 = 0.14;
  kasbf3_1 = 1; kasbf3_1 is "kasbf2";
  kasbf4_1 = 1; kasbf4_1 is "kasbf3";
  kasbf5_1 = 1; kasbf5_1 is "kasbf4";
  kasbf6_1 = 0.11; kasbf6_1 is "kasbf5";
  kp_2 = 0.01; kp_2 is "kp'";
  kp_3 = 1; kp_3 is "kp''";
  epb5q_1 = 1;
  kpp14_1 = 1;
  MSN5_1 = 25;
  kimp_1 = 4;
  PPase_1 = 1;
  kasmbf_1 = 30;
  kdimbf_1 = 1;
  kimbf01_1 = 0.6;
  kmbf10_1 = 0.12;
  kimbf02_1 = 1.2;
  kmbf20_1 = 0.12;
  ksnrm1_2 = 0.08; ksnrm1_2 is "ksnrm1'";
  kdnrm1_1 = 0.08;
  kydj1_1 = 1;
  kssa0_1 = 0.6;
  kssab2_1 = 0.5;
  kssaw5_1 = 7;
  CLN3T_1 = 0.075;
  kgkcln3_1 = 1;
  BCK2T_1 = 0.075;
  Jacln3_1 = 1;
  Jicln3_1 = 1;
  Jabck2_1 = 1;
  Jibck2_1 = 1;
  MAXMASS_1 = 28;
  DNATIMER_1 = 20;
  kgalbck2_1 = 3;
  kgalcln3_1 = 15;
  kgalcln2_1 = 0.17;
  kgalclb5_1 = 0.016;
  kgalclb2_1 = 0.38;
  whi5op_1 = 10;
  kgalsic1_1 = 0.132;
  kgalcdc6_1 = 0.4;
  kmcbck2_1 = 5;
  kmccln2_1 = 4;
  kmccln3_1 = 15;
  kmcclb5_1 = 4;
  kmcsic1_1 = 4;
  kmccdc6_1 = 5;
  kmcwhi5_1 = 10;

  // Assignment rules:
  T9_2 := 1*IEP_1 + 1*IE_1;
  T8_2 := 1*TEM1GDP_1 + 1*TEM1GTP_1;
  T7_2 := 1*CDC15_1 + 1*CDC15i_1;
  T6_2 := 1*ESP1_1 + 1*PE_1;
  T5_2 := 1*PROM2_1 + 1*SBFB6PQ_1 + 1*SBFB6P_1 + 1*SBFB_1 + 1*SWI4B_1 + 1*W4B_1 + 1*WSB56P_1 + 1*WSB5P_1 + 1*WSB6PQ_1 + 1*WSB6P_1 + 1*WSB_1;
  T4_2 := 1*SBFB6PQ_1 + 1*SBFB6P_1 + 1*SBFB_1 + 1*SBFF46PQ_1 + 1*SBFF46P_1 + 1*SBFF4P_1 + 1*SBFF6PQ_1 + 1*SBFF6P_1 + 1*SBFF_1 + 1*SWI4B_1 + 4*SWI4C_1 + 1*SWI4F_1 + 4*SWI4PC_1 + 1*SWI4P_1 + 1*SWI4_1 + 1*W4B_1 + 1*WSB56P_1 + 1*WSB5P_1 + 1*WSB6PQ_1 + 1*WSB6P_1 + 1*WSB_1 + 1*WSF45P_1 + 1*WSF46PQ_1 + 1*WSF46P_1 + 1*WSF4P_1 + 1*WSF56P_1 + 1*WSF5P_1 + 1*WSF6PQ_1 + 1*WSF6P_1 + 1*WSF_1;
  T3_2 := 1*W4B_1 + 4*WHI5C_1 + 4*WHI5PC_1 + 1*WHI5PN_1 + 1*WHI5_1 + 1*WMB_1 + 1*WSB56P_1 + 1*WSB5P_1 + 1*WSB6PQ_1 + 1*WSB6P_1 + 1*WSB_1 + 1*WSF45P_1 + 1*WSF46PQ_1 + 1*WSF46P_1 + 1*WSF4P_1 + 1*WSF56P_1 + 1*WSF5P_1 + 1*WSF6PQ_1 + 1*WSF6P_1 + 1*WSF_1;
  T2_2 := 1*MBFa_1 + 1*MBFi_1 + 1*MBFo_1 + 1*MBFp_1 + 1*MBFpo_1 + 1*PROM5_1 + 1*WMB_1;
  T1_2 := 1*MBFF_1 + 1*MBFa_1 + 1*MBFi_1 + 1*MBFo_1 + 1*MBFp_1 + 1*MBFpo_1 + 1*MBP1_1 + 1*WMB_1;
  T0_2 := 1*MBFF_1 + 1*MBFa_1 + 1*MBFi_1 + 1*MBFo_1 + 1*MBFp_1 + 1*MBFpo_1 + 1*SBFB6PQ_1 + 1*SBFB6P_1 + 1*SBFB_1 + 1*SBFF46PQ_1 + 1*SBFF46P_1 + 1*SBFF4P_1 + 1*SBFF6PQ_1 + 1*SBFF6P_1 + 1*SBFF_1 + 4*SWI6C_1 + 4*SWI6PQC_1 + 1*SWI6PQ_1 + 1*SWI6P_1 + 4*SWI6QC_1 + 1*SWI6_1 + 1*WMB_1 + 1*WSB56P_1 + 1*WSB5P_1 + 1*WSB6PQ_1 + 1*WSB6P_1 + 1*WSB_1 + 1*WSF45P_1 + 1*WSF46PQ_1 + 1*WSF46P_1 + 1*WSF4P_1 + 1*WSF56P_1 + 1*WSF5P_1 + 1*WSF6PQ_1 + 1*WSF6P_1 + 1*WSF_1;
  T9_1 := 1*IEP_1 + 1*IE_1;
  T8_1 := 1*TEM1GDP_1 + 1*TEM1GTP_1;
  T7_1 := 1*CDC15_1 + 1*CDC15i_1;
  T6_1 := 1*ESP1_1 + 1*PE_1;
  T5_1 := 1*PROM2_1 + 1*SBFB6PQ_1 + 1*SBFB6P_1 + 1*SBFB_1 + 1*SWI4B_1 + 1*W4B_1 + 1*WSB56P_1 + 1*WSB5P_1 + 1*WSB6PQ_1 + 1*WSB6P_1 + 1*WSB_1;
  T4_1 := 1*SBFB6PQ_1 + 1*SBFB6P_1 + 1*SBFB_1 + 1*SBFF46PQ_1 + 1*SBFF46P_1 + 1*SBFF4P_1 + 1*SBFF6PQ_1 + 1*SBFF6P_1 + 1*SBFF_1 + 1*SWI4B_1 + 4*SWI4C_1 + 1*SWI4F_1 + 4*SWI4PC_1 + 1*SWI4P_1 + 1*SWI4_1 + 1*W4B_1 + 1*WSB56P_1 + 1*WSB5P_1 + 1*WSB6PQ_1 + 1*WSB6P_1 + 1*WSB_1 + 1*WSF45P_1 + 1*WSF46PQ_1 + 1*WSF46P_1 + 1*WSF4P_1 + 1*WSF56P_1 + 1*WSF5P_1 + 1*WSF6PQ_1 + 1*WSF6P_1 + 1*WSF_1;
  T3_1 := 1*W4B_1 + 4*WHI5C_1 + 4*WHI5PC_1 + 1*WHI5PN_1 + 1*WHI5_1 + 1*WMB_1 + 1*WSB56P_1 + 1*WSB5P_1 + 1*WSB6PQ_1 + 1*WSB6P_1 + 1*WSB_1 + 1*WSF45P_1 + 1*WSF46PQ_1 + 1*WSF46P_1 + 1*WSF4P_1 + 1*WSF56P_1 + 1*WSF5P_1 + 1*WSF6PQ_1 + 1*WSF6P_1 + 1*WSF_1;
  T2_1 := 1*MBFa_1 + 1*MBFi_1 + 1*MBFo_1 + 1*MBFp_1 + 1*MBFpo_1 + 1*PROM5_1 + 1*WMB_1;
  T1_1 := 1*MBFF_1 + 1*MBFa_1 + 1*MBFi_1 + 1*MBFo_1 + 1*MBFp_1 + 1*MBFpo_1 + 1*MBP1_1 + 1*WMB_1;
  T0_1 := 1*MBFF_1 + 1*MBFa_1 + 1*MBFi_1 + 1*MBFo_1 + 1*MBFp_1 + 1*MBFpo_1 + 1*SBFB6PQ_1 + 1*SBFB6P_1 + 1*SBFB_1 + 1*SBFF46PQ_1 + 1*SBFF46P_1 + 1*SBFF4P_1 + 1*SBFF6PQ_1 + 1*SBFF6P_1 + 1*SBFF_1 + 4*SWI6C_1 + 4*SWI6PQC_1 + 1*SWI6PQ_1 + 1*SWI6P_1 + 4*SWI6QC_1 + 1*SWI6_1 + 1*WMB_1 + 1*WSB56P_1 + 1*WSB5P_1 + 1*WSB6PQ_1 + 1*WSB6P_1 + 1*WSB_1 + 1*WSF45P_1 + 1*WSF46PQ_1 + 1*WSF46P_1 + 1*WSF4P_1 + 1*WSF56P_1 + 1*WSF5P_1 + 1*WSF6PQ_1 + 1*WSF6P_1 + 1*WSF_1;
  mu_1 := ln(2)/mdt_1;
  D_1 := 1.026/mu_1 - 32;
  F_1 := exp(-mu_1*D_1);
  YDJ1_1 := kydj1_1*MASS_1;
  SSA1_1 := (kssa0_1 + kssab2_1*CLB2_1 + kssaw5_1*SWI5_1)*(90/mdt_1);
  Vacln3_1 := kgkcln3_1*YDJ1_1;
  CLN3_1 := piecewise(0, CLN3T_1 == 0, CLN3T_1*MASS_1*GK_1(Vacln3_1, SSA1_1, Jacln3_1*CLN3T_1, Jicln3_1*CLN3T_1));
  BCK2_1 := piecewise(0, BCK2T_1 == 0, BCK2T_1*MASS_1*GK_1(Vacln3_1, SSA1_1, Jabck2_1*BCK2T_1, Jibck2_1*BCK2T_1));
  MCM1_1 := GK_1(kamcm_1*CLB2_1, kimcm_1, Jamcm_1, Jimcm_1);
  Vdb2_1 := kdb2_1 + kdb2_2*CDH1_1 + kdb2_3*CDC20_1;
  Vdb5_2 := kdb5_1 + kdb5_2*CDC20_1;
  Vd2c1_1 := kd2c1_1*(ec1n3_1*CLN3_1 + ec1k2_1*BCK2_1 + ec1n2_1*CLN2_1 + ec1b5_1*CLB5_1 + ec1b2_1*CLB2_1);
  Vd2f6_1 := kd2f6_1*(ef6n3_1*CLN3_1 + ef6k2_1*BCK2_1 + ef6n2_1*CLN2_1 + ef6b5_1*CLB5_1 + ef6b2_1*CLB2_1);
  Vppc1_1 := kppc1_1*CDC14_1;
  Vppf6_1 := kppf6_1*CDC14_1;
  Vkpc1_1 := kd1c1_1 + Vd2c1_1/(Jd2c1_1 + SIC1_1 + C2_1 + C5_1);
  Vkpf6_1 := kd1f6_1 + Vd2f6_1/(Jd2f6_1 + CDC6_1 + F2_1 + F5_1);
  Vaiep_1 := kaiep_1*CLB2_1;
  Vd20_1 := kd20_1 + kd20_2*CDH1_1;
  Vacdh_1 := kacdh_1 + kacdh_2*CDC14_1;
  Vicdh_1 := kicdh_1 + kicdh_2*(eicdhn3_1*CLN3_1 + eicdhn2_1*CLN2_1 + eicdhb5_1*CLB5_1 + eicdhb2_1*CLB2_1);
  Vkpnet_1 := kpnet_1 + kpnet_2*CDC15_1;
  PP2A_1 := PP2AT_1*(1 + ki_1*kpp_1*ESP1_1)/(1 + ki_1*ESP1_1);
  Vppnet_1 := kppnet_1 + kppnet_2*PP2A_1;
  Vdpds_1 := kdpds_1 + kdpds_2*CDC20_1 + kdpds_3*CDH1_1;
  Vpn_1 := epn3_1*CLN3_1 + epn2_1*CLN2_1 + epb5_1*CLB5_1 + epk2_1*BCK2_1;
  // Added Aug30, 2011 to fix gal-whi5 mutants
  Vpcln_1 := Vpnmax_1*(Vpn_1^N_1/(Jpn_1^N_1 + Vpn_1^N_1));
  // Added Aug. 4 2012 to explain GAL-CDC14 G1 arrest
  Vppcln_1 := kppcln_1 + kppcln_2*CDC14_1;
  Vpnm_1 := epn3m_1*CLN3_1 + epn2m_1*CLN2_1 + epb5m_1*CLB5_1 + epk2m_1*BCK2_1;
  Vpclnm_1 := Vpmaxm_1*(Vpnm_1^N_1/(Jpn_1^N_1 + Vpnm_1^N_1));
  // Let p'lation of Whi5 with diff. efficiencies
  Vpnw_1 := epn3w_1*CLN3_1 + epn2w_1*CLN2_1 + epb5w_1*CLB5_1 + epk2w_1*BCK2_1;
  Vpclnw_1 := Vnmaxw_1*(Vpnw_1^N_1/(Jpn_1^N_1 + Vpnw_1^N_1));
  Vpclb_1 := kp_2 + kp_3*CLB2_1;
  // cyto 6Q and whi5p; nuclear 4p
  Vpp14_1 := kpp14_1*CDC14_1;
  Vpclb26_1 := kp_2 + kp_3*CLB2_1 + epb5q_1*CLB5_1;
  // cyto 6P and 4P
  Vppase_1 := PPase_1;
  CLB2T_1 := CLB2_1 + C2_1 + F2_1 + C2P_1 + F2P_1;
  CLB5T_1 := CLB5_1 + C5_1 + F5_1 + C5P_1 + F5P_1;
  CDC14T_1 := CDC14_1 + RENT_1 + RENTP_1;
  NET1T_1 := NET1_1 + NET1P_1 + RENT_1 + RENTP_1;
  SIC1T_1 := SIC1_1 + C2_1 + C5_1 + SIC1P_1 + C2P_1 + C5P_1;
  CDC6T_1 := CDC6_1 + F2_1 + F5_1 + CDC6P_1 + F2P_1 + F5P_1;
  CKIT_1 := SIC1T_1 + CDC6T_1;
  SBFact_1 := kasbf1_1*SBFB_1 + kasbf3_1*(SBFB6P_1 + SBFB6PQ_1) + kasbf4_1*(WSB6P_1 + WSB6PQ_1) + kasbf5_1*WSB5P_1 + kasbf6_1*SWI4B_1;
  MBFact_1 := MBFa_1;
  // incl. cmprtmnt info
  SWI6CTOT_1 := SWI6C_1 + SWI6QC_1 + SWI6PQC_1;
  SBFa1_1 := kasbf1_1*SBFB_1;
  SBFa2_1 := kasbf3_1*(SBFB6P_1 + SBFB6PQ_1);
  SBFa3_1 := kasbf4_1*(WSB6P_1 + WSB6PQ_1);
  SBFa4_1 := kasbf5_1*WSB5P_1;
  SBFa5_1 := kasbf6_1*SWI4B_1;
  SWI4nucf_1 := piecewise(0, T4_1 < 1e-8, (T4_1 - 4*(SWI4C_1 + SWI4PC_1))/T4_1);
  WHI5nucf_1 := piecewise(0, T3_1 < 1e-8, (T3_1 - 4*(WHI5C_1 + WHI5PC_1))/T3_1);
  SWI6nucf_1 := piecewise(0, T0_1 < 1e-8, (T0_1 - 4*(SWI6C_1 + SWI6QC_1 + SWI6PQC_1))/T0_1);
  WHI5cycf_1 := 1 - WHI5nucf_1;
  CLN310x_1 := 10*CLN3_1;

  // Reactions:
  Growth: -> MASS_1; Mass_Action_0_1(mu_1*MASS_1*(1 - MASS_1/MAXMASS_1));
  Other_Cyclin_regulation: -> ; ;
  reaction_1: -> CLN2_1; Mass_Action_0_1(ksn2_1 + ksn2_2*SBFact_1 + ksn2_3*MBFact_1);  // modifiers: SBFact_1, MBFact_1
  reaction_2: CLN2_1 -> ; Mass_Action_1_1(kdn2_1, CLN2_1);
  reaction_3: -> CLB5_1; Mass_Action_0_1((ksb5_1 + ksb5_2*SBFact_1 + ksb5_3*MBFact_1)*MASS_1);  // modifiers: SBFact_1, MBFact_1, MASS_1
  reaction_4: CLB5_1 -> ; Mass_Action_1_1(Vdb5_2, CLB5_1);  // modifiers: Vdb5_2
  reaction_5: -> CLB2_1; Mass_Action_0_1((ksb2_1 + ksb2_2*MCM1_1)*MASS_1);  // modifiers: MCM1_1, MASS_1
  reaction_6: CLB2_1 -> ; Mass_Action_1_1(Vdb2_1, CLB2_1);  // modifiers: Vdb2_1
  SIC1_REGLN_OF_CLBS: -> ; ;
  reaction_9: -> SIC1_1; Mass_Action_0_1(ksc1_1 + ksc1_2*SWI5_1);  // modifiers: SWI5_1
  Other_Cyclin_regulation: SIC1_1 -> ; Mass_Action_1_1(kdc1_1, SIC1_1);
  reaction_11: SIC1_1 -> SIC1P_1; Mass_Action_1_1(Vkpc1_1, SIC1_1);  // modifiers: Vkpc1_1
  reaction_12: SIC1P_1 -> SIC1_1; Mass_Action_1_1(Vppc1_1, SIC1P_1);  // modifiers: Vppc1_1
  reaction_13: SIC1P_1 -> ; Mass_Action_1_1(kd3c1_1, SIC1P_1);
  reaction_14: CLB2_1 + SIC1_1 -> C2_1; Mass_Action_2_1(kasb2_1, CLB2_1, SIC1_1);
  reaction_15: C2_1 -> CLB2_1 + SIC1_1; Mass_Action_1_1(kdib2_1, C2_1);
  reaction_16: CLB5_1 + SIC1_1 -> C5_1; Mass_Action_2_1(kasb5_1, CLB5_1, SIC1_1);
  reaction_17: C5_1 -> CLB5_1 + SIC1_1; Mass_Action_1_1(kdib5_1, C5_1);
  reaction_18: C2_1 -> C2P_1; Mass_Action_1_1(Vkpc1_1, C2_1);  // modifiers: Vkpc1_1
  reaction_19: C2P_1 -> C2_1; Mass_Action_1_1(Vppc1_1, C2P_1);  // modifiers: Vppc1_1
  reaction_20: C5_1 -> C5P_1; Mass_Action_1_1(Vkpc1_1, C5_1);  // modifiers: Vkpc1_1
  reaction_21: C5P_1 -> C5_1; Mass_Action_1_1(Vppc1_1, C5P_1);  // modifiers: Vppc1_1
  reaction_22: C2_1 -> SIC1_1; Mass_Action_1_1(Vdb2_1, C2_1);  // modifiers: Vdb2_1
  reaction_23: C5_1 -> SIC1_1; Mass_Action_1_1(Vdb5_2, C5_1);  // modifiers: Vdb5_2
  reaction_24: C2P_1 -> CLB2_1; Mass_Action_1_1(kd3c1_1, C2P_1);
  reaction_25: C5P_1 -> CLB5_1; Mass_Action_1_1(kd3c1_1, C5P_1);
  reaction_26: C2P_1 -> SIC1P_1; Mass_Action_1_1(Vdb2_1, C2P_1);  // modifiers: Vdb2_1
  reaction_27: C5P_1 -> SIC1P_1; Mass_Action_1_1(Vdb5_2, C5P_1);  // modifiers: Vdb5_2
  CDC6_REGLN_OF_CLBS: -> ; ;
  reaction_29: -> CDC6_1; Mass_Action_0_1(ksf6_1 + ksf6_2*SWI5_1 + ksf6_3*SBFact_1);  // modifiers: SWI5_1, SBFact_1
  reaction_30: CDC6_1 -> ; Mass_Action_1_1(kdf6_1, CDC6_1);
  reaction_31: CDC6_1 -> CDC6P_1; Mass_Action_1_1(Vkpf6_1, CDC6_1);  // modifiers: Vkpf6_1
  reaction_32: CDC6P_1 -> CDC6_1; Mass_Action_1_1(Vppf6_1, CDC6P_1);  // modifiers: Vppf6_1
  reaction_33: CDC6P_1 -> ; Mass_Action_1_1(kd3f6_1, CDC6P_1);
  reaction_34: CLB2_1 + CDC6_1 -> F2_1; Mass_Action_2_1(kasf2_1, CLB2_1, CDC6_1);
  reaction_35: F2_1 -> CLB2_1 + CDC6_1; Mass_Action_1_1(kdif2_1, F2_1);
  reaction_36: CLB5_1 + CDC6_1 -> F5_1; Mass_Action_2_1(kasf5_1, CLB5_1, CDC6_1);
  reaction_37: F5_1 -> CLB5_1 + CDC6_1; Mass_Action_1_1(kdif5_1, F5_1);
  reaction_38: F2_1 -> F2P_1; Mass_Action_1_1(Vkpf6_1, F2_1);  // modifiers: Vkpf6_1
  reaction_39: F2P_1 -> F2_1; Mass_Action_1_1(Vppf6_1, F2P_1);  // modifiers: Vppf6_1
  reaction_40: F5_1 -> F5P_1; Mass_Action_1_1(Vkpf6_1, F5_1);  // modifiers: Vkpf6_1
  reaction_41: F5P_1 -> F5_1; Mass_Action_1_1(Vppf6_1, F5P_1);  // modifiers: Vppf6_1
  reaction_42: F2_1 -> CDC6_1; Mass_Action_1_1(Vdb2_1, F2_1);  // modifiers: Vdb2_1
  reaction_43: F5_1 -> CDC6_1; Mass_Action_1_1(Vdb5_2, F5_1);  // modifiers: Vdb5_2
  reaction_44: F2P_1 -> CLB2_1; Mass_Action_1_1(kd3f6_1, F2P_1);
  reaction_45: F5P_1 -> CLB5_1; Mass_Action_1_1(kd3f6_1, F5P_1);
  reaction_46: F2P_1 -> CDC6P_1; Mass_Action_1_1(Vdb2_1, F2P_1);  // modifiers: Vdb2_1
  reaction_47: F5P_1 -> CDC6P_1; Mass_Action_1_1(Vdb5_2, F5P_1);  // modifiers: Vdb5_2
  SWI5_REGULATION: -> ; ;
  reaction_49: -> SWI5_1; Mass_Action_0_1(ksswi_1 + ksswi_2*MCM1_1);  // modifiers: MCM1_1
  reaction_50: SWI5_1 -> ; Mass_Action_1_1(kdswi_1, SWI5_1);
  reaction_51: SWI5_1 -> SWI5P_1; Mass_Action_1_1(kiswi_1*CLB2_1, SWI5_1);  // modifiers: CLB2_1
  reaction_52: SWI5P_1 -> SWI5_1; Mass_Action_1_1(kaswi_1*CDC14_1, SWI5P_1);  // modifiers: CDC14_1
  reaction_53: SWI5P_1 -> ; Mass_Action_1_1(kdswi_1, SWI5P_1);
  IEP_REGULATION: -> ; ;
  reaction_55: IE_1 -> IEP_1; Michaelis_Menten_1(1, Jaiep_1, Vaiep_1, IE_1);  // modifiers: Vaiep_1
  reaction_56: IEP_1 -> IE_1; Michaelis_Menten_1(1, Jiiep_1, kiiep_1, IEP_1);
  CDC20_REGULATION: -> ; ;
  reaction_58: -> CDC20i_1; Mass_Action_0_1(ks20_1 + ks20_2*MCM1_1);  // modifiers: MCM1_1
  reaction_59: CDC20i_1 -> ; Mass_Action_1_1(Vd20_1, CDC20i_1);  // modifiers: Vd20_1
  reaction_60: CDC20i_1 -> CDC20_1; Mass_Action_1_1(ka20_1 + ka20_2*IEP_1, CDC20i_1);  // modifiers: IEP_1
  reaction_61: CDC20_1 -> CDC20i_1; Mass_Action_1_1(MAD2_1, CDC20_1);  // modifiers: MAD2_1
  reaction_62: CDC20_1 -> ; Mass_Action_1_1(Vd20_1, CDC20_1);  // modifiers: Vd20_1
  CDH1_REGULATION: -> ; ;
  reaction_64: -> CDH1_1; Mass_Action_0_1(kscdh_1);
  reaction_65: CDH1_1 -> ; Mass_Action_1_1(kdcdh_1, CDH1_1);
  reaction_66: CDH1_1 -> CDH1i_1; Michaelis_Menten_1(1, Jicdh_1, Vicdh_1, CDH1_1);  // modifiers: Vicdh_1
  reaction_67: CDH1i_1 -> CDH1_1; Michaelis_Menten_1(1, Jacdh_1, Vacdh_1, CDH1i_1);  // modifiers: Vacdh_1
  reaction_68: CDH1i_1 -> ; Mass_Action_1_1(kdcdh_1, CDH1i_1);
  CDC14_NET1: -> ; ; CDC14_NET1 is "CDC14-NET1";
  reaction_70: -> CDC14_1; Mass_Action_0_1(ks14_1);
  reaction_71: CDC14_1 -> ; Mass_Action_1_1(kd14_1, CDC14_1);
  reaction_72: -> NET1_1; Mass_Action_0_1(ksnet_1);
  reaction_73: NET1_1 -> ; Mass_Action_1_1(kdnet_1, NET1_1);
  reaction_74: NET1_1 -> NET1P_1; Mass_Action_1_1(Vkpnet_1, NET1_1);  // modifiers: Vkpnet_1
  reaction_75: NET1P_1 -> NET1_1; Mass_Action_1_1(Vppnet_1, NET1P_1);  // modifiers: Vppnet_1
  reaction_76: NET1P_1 -> ; Mass_Action_1_1(kdnet_1, NET1P_1);
  reaction_72: CDC14_1 + NET1_1 -> RENT_1; Mass_Action_2_1(kasrent_1, CDC14_1, NET1_1);
  reaction_73: RENT_1 -> CDC14_1 + NET1_1; Mass_Action_1_1(kdirent_1, RENT_1);
  reaction_79: CDC14_1 + NET1P_1 -> RENTP_1; Mass_Action_2_1(kasrentp_1, CDC14_1, NET1P_1);
  reaction_80: RENTP_1 -> CDC14_1 + NET1P_1; Mass_Action_1_1(kdirentp_1, RENTP_1);
  reaction_81: RENT_1 -> RENTP_1; Mass_Action_1_1(Vkpnet_1, RENT_1);  // modifiers: Vkpnet_1
  reaction_82: RENTP_1 -> RENT_1; Mass_Action_1_1(Vppnet_1, RENTP_1);  // modifiers: Vppnet_1
  reaction_83: RENT_1 -> CDC14_1; Mass_Action_1_1(kdnet_1, RENT_1);
  reaction_84: RENTP_1 -> CDC14_1; Mass_Action_1_1(kdnet_1, RENTP_1);
  reaction_85: RENT_1 -> NET1_1; Mass_Action_1_1(kd14_1, RENT_1);
  reaction_86: RENTP_1 -> NET1P_1; Mass_Action_1_1(kd14_1, RENTP_1);
  TEM1_REGULATION: -> ; ;
  reaction_88: TEM1GDP_1 -> TEM1GTP_1; Michaelis_Menten_1(1, Jatem_1, LTE1_1, TEM1GDP_1);  // modifiers: LTE1_1
  reaction_89: TEM1GTP_1 -> TEM1GDP_1; Michaelis_Menten_1(1, Jitem_1, BUB2_1, TEM1GTP_1);  // modifiers: BUB2_1
  CDC15_REGULATION: -> ; ;
  reaction_91: CDC15i_1 -> CDC15_1; Mass_Action_1_1(ka15_1*TEM1GDP_1 + ka15_2*TEM1GTP_1 + ka15_3*CDC14_1, CDC15i_1);  // modifiers: TEM1GDP_1, TEM1GTP_1, CDC14_1
  reaction_92: CDC15_1 -> CDC15i_1; Mass_Action_1_1(ki15_1, CDC15_1);
  PDS1_ESP1: -> ; ; PDS1_ESP1 is "PDS1-ESP1";
  reaction_97: -> PDS1_1; Mass_Action_0_1(kspds_1);
  reaction_98: PDS1_1 -> ; Mass_Action_1_1(Vdpds_1, PDS1_1);  // modifiers: Vdpds_1
  reaction_99: PDS1_1 + ESP1_1 -> PE_1; Mass_Action_2_1(kasesp_1, PDS1_1, ESP1_1);
  reaction_100: PE_1 -> PDS1_1 + ESP1_1; Mass_Action_1_1(kdiesp_1, PE_1);
  reaction_101: PE_1 -> ESP1_1; Mass_Action_1_1(Vdpds_1, PE_1);  // modifiers: Vdpds_1
  MARKERS_ORI_BUD_SPN: -> ; ; MARKERS_ORI_BUD_SPN is "MARKERS - ORI, BUD, SPN";
  reaction_103: -> ORI_1; Mass_Action_0_1(ksori_1*(eorib5_1*CLB5_1 + eorib2_1*CLB2_1));  // modifiers: CLB5_1, CLB2_1
  reaction_104: ORI_1 -> ; Mass_Action_1_1(kdori_1, ORI_1);
  reaction_105: -> BUD_1; Mass_Action_0_1(ksbud_1*(ebudn2_1*CLN2_1 + ebudn3_1*CLN3_1 + ebudb5_1*CLB5_1));  // modifiers: CLN2_1, CLN3_1, CLB5_1
  reaction_106: BUD_1 -> ; Mass_Action_1_1(kdbud_1, BUD_1);
  reaction_107: -> SPN_1; Mass_Action_0_1(ksspn_1*CLB2_1/(Jspn_1 + CLB2_1));  // modifiers: CLB2_1
  reaction_108: SPN_1 -> ; Mass_Action_1_1(kdspn_1, SPN_1);
  CHKPT_PROTEINS_MAD2_LTE1_BUB2: -> ; ; CHKPT_PROTEINS_MAD2_LTE1_BUB2 is "CHKPT PROTEINS - MAD2, LTE1, BUB2";
  reaction_110: -> MAD2_1; Mass_Action_0_1(0);
  reaction_111: -> LTE1_1; Mass_Action_0_1(0);
  reaction_112: -> BUB2_1; Mass_Action_0_1(0);
  SBF_complexes: -> ; ; SBF_complexes is "SBF complexes===============";
  _01f: => ; ; _01f is "free forms";
  _01f: SWI4_1 + SWI6_1 -> SBFF_1; Mass_Action_2_1(kas46_1, SWI4_1, SWI6_1);
  _01r: SBFF_1 -> SWI4_1 + SWI6_1; Mass_Action_1_1(kdi46_1, SBFF_1);
  _02f: WHI5_1 + SBFF_1 -> WSF_1; Mass_Action_2_1(kasws_1, WHI5_1, SBFF_1);
  _02r: WSF_1 -> WHI5_1 + SBFF_1; Mass_Action_1_1(kdiws_1, WSF_1);
  _03r: => ; ; _03r is "Prom bound forms";
  _03f: SBFF_1 + PROM2_1 -> SBFB_1; Mass_Action_2_1(kasprom_1, SBFF_1, PROM2_1);
  _03r: SBFB_1 -> SBFF_1 + PROM2_1; Mass_Action_1_1(kdiprom_1, SBFB_1);
  _04f: WSF_1 + PROM2_1 -> WSB_1; Mass_Action_2_1(kasprom_1, WSF_1, PROM2_1);
  _04r: WSB_1 -> WSF_1 + PROM2_1; Mass_Action_1_1(kdiprom_1, WSB_1);
  _05f: WHI5_1 + SBFB_1 -> WSB_1; Mass_Action_2_1(kasws_1, WHI5_1, SBFB_1);
  _05r: WSB_1 -> WHI5_1 + SBFB_1; Mass_Action_1_1(kdiws_1, WSB_1);
  SWI4B_FORM: -> ; ;
  _09f: SWI4_1 -> SWI4F_1; Mass_Action_1_1(ksbs4_1*BCK2_1, SWI4_1);  // modifiers: BCK2_1
  _10r: SWI4F_1 -> SWI4_1; Mass_Action_1_1(kdbs4_1, SWI4F_1); _10r is "09r";
  _10f: SWI4F_1 + PROM2_1 -> SWI4B_1; Mass_Action_2_1(kasprom_1, SWI4F_1, PROM2_1);
  _10r: SWI4B_1 -> SWI4F_1 + PROM2_1; Mass_Action_1_1(kdiprom_1, SWI4B_1);
  _13f: SWI4B_1 + WHI5_1 => W4B_1; Mass_Action_2_1(kasw4_1, SWI4B_1, WHI5_1); _13f is "57f";
  _13r: W4B_1 => SWI4B_1 + WHI5_1; Mass_Action_1_1(kdiw4_1, W4B_1); _13r is "57r";
  _16f: W4B_1 => SWI4B_1 + WHI5PN_1; Mass_Action_1_1(ef5p_1*Vpclnw_1, W4B_1); _16f is "58";  // modifiers: Vpclnw_1
  CLN3_P_lation_Free_forms: -> ; ; CLN3_P_lation_Free_forms is "CLN3 P'lation Free forms";
  _11f: WHI5_1 -> WHI5PN_1; Mass_Action_1_1(ef5p_1*Vpclnw_1, WHI5_1);  // modifiers: Vpclnw_1
  _11r: WHI5PN_1 -> WHI5_1; Mass_Action_1_1(Vppcln_1, WHI5PN_1);  // modifiers: Vppcln_1
  _13f: SWI6_1 -> SWI6P_1; Mass_Action_1_1(ef6p_1*Vpcln_1, SWI6_1); _13f is "12f";  // modifiers: Vpcln_1
  _13r: SWI6P_1 -> SWI6_1; Mass_Action_1_1(Vppcln_1, SWI6P_1); _13r is "12r";  // modifiers: Vppcln_1
  _13f: SBFF_1 -> SBFF6P_1; Mass_Action_1_1(ef6p_1*Vpcln_1, SBFF_1);  // modifiers: Vpcln_1
  _13r: SBFF6P_1 -> SBFF_1; Mass_Action_1_1(Vppcln_1, SBFF6P_1);  // modifiers: Vppcln_1
  _17: WSF_1 -> WSF5P_1; Mass_Action_1_1(ef5p_1*Vpclnw_1, WSF_1); _17 is "14f";  // modifiers: Vpclnw_1
  _14r: WSF5P_1 -> WSF_1; Mass_Action_1_1(Vppcln_1, WSF5P_1);  // modifiers: Vppcln_1
  // complex unstable
  _21f: WSF5P_1 -> SBFF_1 + WHI5PN_1; Mass_Action_1_1(kdiwp_1, WSF5P_1); _21f is "15";
  _16f: WSF_1 -> WSF6P_1; Mass_Action_1_1(ef6p_1*Vpcln_1, WSF_1);  // modifiers: Vpcln_1
  _16r: WSF6P_1 -> WSF_1; Mass_Action_1_1(Vppcln_1, WSF6P_1);  // modifiers: Vppcln_1
  _17: WSF6P_1 -> WSF56P_1; Mass_Action_1_1(ef5p_1*Vpclnw_1, WSF6P_1);  // modifiers: Vpclnw_1
  // complex unstable
  _19r: WSF56P_1 -> SBFF6P_1 + WHI5PN_1; Mass_Action_1_1(kdiwp_1, WSF56P_1); _19r is "18";
  CLN3_P_lation_bound_forms: -> ; ; CLN3_P_lation_bound_forms is "CLN3 P'lation bound forms";
  _19f: SBFB_1 -> SBFB6P_1; Mass_Action_1_1(ef6p_1*Vpcln_1, SBFB_1);  // modifiers: Vpcln_1
  _19r: SBFB6P_1 -> SBFB_1; Mass_Action_1_1(Vppcln_1, SBFB6P_1);  // modifiers: Vppcln_1
  // no dissociation to SBFB+WHI5PN, for Wagner 2009.
  _20f: WSB_1 -> WSB5P_1; Mass_Action_1_1(ef5p_1*Vpclnw_1, WSB_1);  // modifiers: Vpclnw_1
  _20r: WSB5P_1 -> WSB_1; Mass_Action_1_1(Vppcln_1, WSB5P_1);  // modifiers: Vppcln_1
  _21f: WSB_1 -> WSB6P_1; Mass_Action_1_1(ef6p_1*Vpcln_1, WSB_1);  // modifiers: Vpcln_1
  _21r: WSB6P_1 -> WSB_1; Mass_Action_1_1(Vppcln_1, WSB6P_1);  // modifiers: Vppcln_1
  _23f: WSB5P_1 -> WSB56P_1; Mass_Action_1_1(ef6p_1*Vpcln_1, WSB5P_1); _23f is "22f";  // modifiers: Vpcln_1
  _23r: WSB56P_1 -> WSB5P_1; Mass_Action_1_1(Vppcln_1, WSB56P_1); _23r is "22r";  // modifiers: Vppcln_1
  _23f: WSB6P_1 -> WSB56P_1; Mass_Action_1_1(ef5p_1*Vpclnw_1, WSB6P_1);  // modifiers: Vpclnw_1
  _23r: WSB56P_1 -> WSB6P_1; Mass_Action_1_1(Vppcln_1, WSB56P_1);  // modifiers: Vppcln_1
  // complex unstable
  _24: WSB56P_1 -> SBFB6P_1 + WHI5PN_1; Mass_Action_1_1(kdiwp_1, WSB56P_1);
  _33r: => ; ; _33r is "CLB26 P'lation free forms";
  // Swi6PQ for msn5 export
  _25f: SWI6P_1 -> SWI6PQ_1; Mass_Action_1_1(ef6q_1*Vpclb26_1, SWI6P_1);  // modifiers: Vpclb26_1
  _25r: SWI6PQ_1 -> SWI6P_1; Mass_Action_1_1(Vpp14_1, SWI6PQ_1);  // modifiers: Vpp14_1
  _26f: SBFF6P_1 -> SBFF6PQ_1; Mass_Action_1_1(ef6q_1*Vpclb26_1, SBFF6P_1);  // modifiers: Vpclb26_1
  _26r: SBFF6PQ_1 -> SBFF6P_1; Mass_Action_1_1(Vpp14_1, SBFF6PQ_1);  // modifiers: Vpp14_1
  _27f: WSF6P_1 -> WSF6PQ_1; Mass_Action_1_1(ef6q_1*Vpclb26_1, WSF6P_1);  // modifiers: Vpclb26_1
  _33r: WSF6PQ_1 -> WSF6P_1; Mass_Action_1_1(Vpp14_1, WSF6PQ_1); _33r is "27r";  // modifiers: Vpp14_1
  _47: => ; ; _47 is "CLB26 P'lation bound form";
  _47: SBFB6P_1 -> SBFB6PQ_1; Mass_Action_1_1(ef6q_1*Vpclb26_1, SBFB6P_1); _47 is "28f";  // modifiers: Vpclb26_1
  _76r: SBFB6PQ_1 -> SBFB6P_1; Mass_Action_1_1(Vpp14_1, SBFB6PQ_1); _76r is "28r";  // modifiers: Vpp14_1
  _29f: WSB6P_1 -> WSB6PQ_1; Mass_Action_1_1(ef6q_1*Vpclb26_1, WSB6P_1);  // modifiers: Vpclb26_1
  // n rev rxn - modfd 14
  _78r: WSB6PQ_1 -> WSB6P_1; Mass_Action_1_1(Vpp14_1, WSB6PQ_1); _78r is "29r";  // modifiers: Vpp14_1
  _50: => ; ; _50 is "Other complex form";
  // Assoc Swi4&SWI6P
  NRM1_REGULATION: SWI4_1 + SWI6P_1 => SBFF6P_1; Mass_Action_2_1(kas46_1, SWI4_1, SWI6P_1); NRM1_REGULATION is "30f";
  _85: SBFF6P_1 => SWI4_1 + SWI6P_1; Mass_Action_1_1(kdi46_1, SBFF6P_1); _85 is "30r";
  _86: SWI4_1 + SWI6PQ_1 => SBFF6PQ_1; Mass_Action_2_1(kas46_1, SWI4_1, SWI6PQ_1); _86 is "31f";
  _31r: SBFF6PQ_1 => SWI4_1 + SWI6PQ_1; Mass_Action_1_1(kdi46_1, SBFF6PQ_1);
  CLB2_P_lation_bound_forms: WHI5_1 + SBFF6P_1 => WSF6P_1; Mass_Action_2_1(kasws_1, WHI5_1, SBFF6P_1); CLB2_P_lation_bound_forms is "52f";
  DePlation_in_cyto: WSF6P_1 => WHI5_1 + SBFF6P_1; Mass_Action_1_1(kdiws_1, WSF6P_1); DePlation_in_cyto is "52r";
  _68: WHI5_1 + SBFF6PQ_1 => WSF6PQ_1; Mass_Action_2_1(kasws_1, WHI5_1, SBFF6PQ_1); _68 is "53f";
  _70: WSF6PQ_1 => WHI5_1 + SBFF6PQ_1; Mass_Action_1_1(kdiws_1, WSF6PQ_1); _70 is "53r";
  _54f: SWI4P_1 + SWI6_1 => SBFF4P_1; Mass_Action_2_1(kas46_1, SWI4P_1, SWI6_1);
  _54r: SBFF4P_1 => SWI4P_1 + SWI6_1; Mass_Action_1_1(kdi46_1, SBFF4P_1);
  _55f: SWI4P_1 + SWI6P_1 => SBFF46P_1; Mass_Action_2_1(kas46_1, SWI4P_1, SWI6P_1);
  _55r: SBFF46P_1 => SWI4P_1 + SWI6P_1; Mass_Action_1_1(kdi46_1, SBFF46P_1);
  _56f: SWI4P_1 + SWI6PQ_1 => SBFF46PQ_1; Mass_Action_2_1(kas46_1, SWI4P_1, SWI6PQ_1);
  _56r: SBFF46PQ_1 => SWI4P_1 + SWI6PQ_1; Mass_Action_1_1(kdi46_1, SBFF46PQ_1);
  CLB2_P_lation_Swi4_free_forms: -> ; ; CLB2_P_lation_Swi4_free_forms is "CLB2 P'lation Swi4 free forms";
  _32f: SWI4_1 -> SWI4P_1; Mass_Action_1_1(ef4p_1*Vpclb_1, SWI4_1);  // modifiers: Vpclb_1
  _32r: SWI4P_1 -> SWI4_1; Mass_Action_1_1(Vpp14_1, SWI4P_1);  // modifiers: Vpp14_1
  _33r: SBFF_1 -> SBFF4P_1; Mass_Action_1_1(ef4p_1*Vpclb_1, SBFF_1); _33r is "33f";  // modifiers: Vpclb_1
  _33r: SBFF4P_1 -> SBFF_1; Mass_Action_1_1(Vpp14_1, SBFF4P_1);  // modifiers: Vpp14_1
  _34f: SBFF6P_1 -> SBFF46P_1; Mass_Action_1_1(ef4p_1*Vpclb_1, SBFF6P_1);  // modifiers: Vpclb_1
  _34r: SBFF46P_1 -> SBFF6P_1; Mass_Action_1_1(Vpp14_1, SBFF46P_1);  // modifiers: Vpp14_1
  CLB2_P_lation_free_WSF: SBFF46P_1 -> SBFF4P_1; Mass_Action_1_1(Vppcln_1, SBFF46P_1); CLB2_P_lation_free_WSF is "35";  // modifiers: Vppcln_1
  _36f: SBFF6PQ_1 -> SBFF46PQ_1; Mass_Action_1_1(ef4p_1*Vpclb_1, SBFF6PQ_1);  // modifiers: Vpclb_1
  _36r: SBFF46PQ_1 -> SBFF6PQ_1; Mass_Action_1_1(Vpp14_1, SBFF46PQ_1);  // modifiers: Vpp14_1
  _46: SBFF46P_1 -> SBFF46PQ_1; Mass_Action_1_1(ef6q_1*Vpclb26_1, SBFF46P_1); _46 is "37f";  // modifiers: Vpclb26_1
  _69: SBFF46PQ_1 -> SBFF46P_1; Mass_Action_1_1(Vpp14_1, SBFF46PQ_1); _69 is "37r";  // modifiers: Vpp14_1
  CLB2_P_lation_free_WSF: -> ; ; CLB2_P_lation_free_WSF is "CLB2 P'lation free WSF";
  _38f: WSF_1 -> WSF4P_1; Mass_Action_1_1(ef4p_1*Vpclb_1, WSF_1);  // modifiers: Vpclb_1
  _50: WSF4P_1 -> WSF_1; Mass_Action_1_1(Vpp14_1, WSF4P_1); _50 is "38r";  // modifiers: Vpp14_1
  _70: WSF6P_1 -> WSF46P_1; Mass_Action_1_1(ef4p_1*Vpclb_1, WSF6P_1); _70 is "39f";  // modifiers: Vpclb_1
  QUICK_REIMPORT: WSF46P_1 -> WSF6P_1; Mass_Action_1_1(Vpp14_1, WSF46P_1); QUICK_REIMPORT is "39r";  // modifiers: Vpp14_1
  _70: WSF46P_1 -> WSF4P_1; Mass_Action_1_1(Vppcln_1, WSF46P_1); _70 is "40";  // modifiers: Vppcln_1
  _71: WSF6PQ_1 -> WSF46PQ_1; Mass_Action_1_1(ef4p_1*Vpclb_1, WSF6PQ_1); _71 is "41f";  // modifiers: Vpclb_1
  _72: WSF46PQ_1 -> WSF6PQ_1; Mass_Action_1_1(Vpp14_1, WSF46PQ_1); _72 is "41r";  // modifiers: Vpp14_1
  _73: WSF46P_1 -> WSF46PQ_1; Mass_Action_1_1(ef6q_1*Vpclb26_1, WSF46P_1); _73 is "42f";  // modifiers: Vpclb26_1
  _42r: WSF46PQ_1 -> WSF46P_1; Mass_Action_1_1(Vpp14_1, WSF46PQ_1);  // modifiers: Vpp14_1
  CLB2_P_lation_bound_forms: -> ; ; CLB2_P_lation_bound_forms is "CLB2 P'lation bound forms";
  _76f: SBFB_1 -> SBFF4P_1 + PROM2_1; Mass_Action_1_1(ef4p_1*Vpclb_1, SBFB_1); _76f is "43";  // modifiers: Vpclb_1
  _77f: SBFB6P_1 -> SBFF46P_1 + PROM2_1; Mass_Action_1_1(ef4p_1*Vpclb_1, SBFB6P_1); _77f is "44";  // modifiers: Vpclb_1
  _68: SBFB6PQ_1 -> SBFF46PQ_1 + PROM2_1; Mass_Action_1_1(ef4p_1*Vpclb_1, SBFB6PQ_1); _68 is "45";  // modifiers: Vpclb_1
  _46: WSB_1 -> WSF4P_1 + PROM2_1; Mass_Action_1_1(ef4p_1*Vpclb_1, WSB_1);  // modifiers: Vpclb_1
  _47: WSB5P_1 -> WSF45P_1 + PROM2_1; Mass_Action_1_1(ef4p_1*Vpclb_1, WSB5P_1);  // modifiers: Vpclb_1
  _79r: WSB6P_1 -> WSF46P_1 + PROM2_1; Mass_Action_1_1(ef4p_1*Vpclb_1, WSB6P_1); _79r is "48";  // modifiers: Vpclb_1
  QUICK_REIMPORT: WSB6PQ_1 -> WSF46PQ_1 + PROM2_1; Mass_Action_1_1(ef4p_1*Vpclb_1, WSB6PQ_1); QUICK_REIMPORT is "49";  // modifiers: Vpclb_1
  _76r: -> ; ; _76r is "CLB2 P'lation Bck2 forms";
  _50: SWI4B_1 -> SWI4P_1 + PROM2_1; Mass_Action_1_1(Vpclb_1, SWI4B_1);  // modifiers: Vpclb_1
  _69: -> ; ; _69 is "EXPORT/ DISSO";
  _61: WHI5PN_1 -> WHI5PC_1; Mass_Action_1_1(MSN5_1, WHI5PN_1);
  _71: SBFF6PQ_1 -> SWI4C_1 + SWI6PQC_1; Mass_Action_1_1(MSN5_1, SBFF6PQ_1); _71 is "62";
  _80f: SBFF46PQ_1 -> SWI4PC_1 + SWI6PQC_1; Mass_Action_1_1(MSN5_1, SBFF46PQ_1); _80f is "63";
  _82f: WSF6PQ_1 -> WHI5C_1 + SWI4C_1 + SWI6PQC_1; Mass_Action_1_1(MSN5_1, WSF6PQ_1); _82f is "64";
  _80r: WSF46PQ_1 -> WHI5C_1 + SWI4PC_1 + SWI6PQC_1; Mass_Action_1_1(MSN5_1, WSF46PQ_1); _80r is "64";
  _71: WSF45P_1 -> WHI5PC_1 + SWI4PC_1 + SWI6C_1; Mass_Action_1_1(MSN5_1, WSF45P_1); _71 is "66";
  DePlation_in_cyto: -> ; ;
  _81r: SWI4PC_1 -> SWI4C_1; Mass_Action_1_1(Vppase_1, SWI4PC_1); _81r is "67";  // modifiers: Vppase_1
  _68: SWI6PQC_1 -> SWI6QC_1; Mass_Action_1_1(Vppase_1, SWI6PQC_1);  // modifiers: Vppase_1
  _69: SWI6QC_1 -> SWI6C_1; Mass_Action_1_1(Vpp14_1, SWI6QC_1);  // modifiers: Vpp14_1
  _70: WHI5PC_1 -> WHI5C_1; Mass_Action_1_1(Vpp14_1, WHI5PC_1);  // modifiers: Vpp14_1
  QUICK_REIMPORT: -> ; ; QUICK_REIMPORT is "QUICK REIMPORT-------------------------";
  _71: SWI4C_1 -> SWI4_1; Mass_Action_1_1(kimp_1, SWI4C_1);
  _72: SWI6C_1 -> SWI6_1; Mass_Action_1_1(kimp_1, SWI6C_1);
  _73: WHI5C_1 -> WHI5_1; Mass_Action_1_1(kimp_1, WHI5C_1);
  reaction_221: -> ; ;
  MBF_COMPLEXES: -> ; ; MBF_COMPLEXES is "MBF COMPLEXES==============";
  _76f: MBP1_1 + SWI6_1 -> MBFF_1; Mass_Action_2_1(kasmbf_1, MBP1_1, SWI6_1);
  _76r: MBFF_1 -> MBP1_1 + SWI6_1; Mass_Action_1_1(kdimbf_1, MBFF_1);
  _77f: MBFF_1 + PROM5_1 -> MBFi_1; Mass_Action_2_1(kasprom_1, MBFF_1, PROM5_1);
  _77r: MBFi_1 -> MBFF_1 + PROM5_1; Mass_Action_1_1(kdiprom_1, MBFi_1);
  // Make Vpcln for MBF differ from SBF
  _78f: MBFi_1 -> MBFa_1; Mass_Action_1_1(Vpclnm_1, MBFi_1);  // modifiers: Vpclnm_1
  _78r: MBFa_1 -> MBFi_1; Mass_Action_1_1(Vppcln_1, MBFa_1);  // modifiers: Vppcln_1
  _79f: MBFa_1 -> MBFp_1; Mass_Action_1_1(kimbf01_1*CLB2_1, MBFa_1);  // modifiers: CLB2_1
  _79r: MBFp_1 -> MBFa_1; Mass_Action_1_1(kmbf10_1, MBFp_1);
  _80f: MBFa_1 -> MBFo_1; Mass_Action_1_1(kimbf02_1*NRM1_1, MBFa_1);  // modifiers: NRM1_1
  _80r: MBFo_1 -> MBFa_1; Mass_Action_1_1(kmbf20_1, MBFo_1);
  _82f: MBFo_1 -> MBFpo_1; Mass_Action_1_1(kimbf01_1*CLB2_1, MBFo_1);  // modifiers: CLB2_1
  _82r: MBFpo_1 -> MBFo_1; Mass_Action_1_1(kmbf10_1, MBFpo_1);
  _81f: MBFp_1 -> MBFpo_1; Mass_Action_1_1(kimbf02_1*NRM1_1, MBFp_1);  // modifiers: NRM1_1
  _81r: MBFpo_1 -> MBFp_1; Mass_Action_1_1(kmbf20_1, MBFpo_1);
  _83f: MBFa_1 + WHI5_1 => WMB_1; Mass_Action_2_1(kaswm_1, MBFa_1, WHI5_1);
  _84: WMB_1 => MBFa_1 + WHI5_1; Mass_Action_1_1(kdiwm_1, WMB_1); _84 is "83r";
  _84: WMB_1 => WHI5PN_1 + MBFa_1; Mass_Action_1_1(ef5p_1*Vpclnw_1, WMB_1);  // modifiers: Vpclnw_1
  NRM1_REGULATION: -> ; ;
  _85: -> NRM1_1; Mass_Action_0_1(ksnrm1_2*MBFact_1);  // modifiers: MBFact_1
  _86: NRM1_1 -> ; Mass_Action_1_1(kdnrm1_1, NRM1_1);
  : => ; ;
  Cycle_Timer: => TCYCLE_1; Mass_Action_0_1(1);
  Dec2222012new: => Twhi5_1; Mass_Action_0_1(0);
  reaction_277: => Mwhi5_1; Mass_Action_0_1(0);
  reaction_274: => TBUD_1; Mass_Action_0_1(0);
  reaction_276: => MBUD_1; Mass_Action_0_1(0);
  reaction_249: => ORIFLAG_1; Mass_Action_0_1(0);
  reaction_250: => TORI_1; Mass_Action_0_1(0);
  reaction_251: => UDNA_1; Mass_Action_0_1(0);
  reaction_252: => REPDNA_1; Mass_Action_0_1(0);
  reaction_253: => TSPN_1; Mass_Action_0_1(0);
  reaction_254: => SPNALIGN_1; Mass_Action_0_1(0);
  reaction_255: => SACOFF_1; Mass_Action_0_1(0);
  reaction_276: => MASSBIRTH_1; Mass_Action_0_1(0);
  reaction_279: => MitCat_1; Mass_Action_0_1(0);
  : => ; ;
  Dec2222012new: SBFF4P_1 => SBFF46P_1; Mass_Action_1_1(ef6p_1*Vpcln_1, SBFF4P_1);  // modifiers: Vpcln_1
  reaction_277: WSF4P_1 => WSF46P_1; Mass_Action_1_1(ef6p_1*Vpcln_1, WSF4P_1);  // modifiers: Vpcln_1
  reaction_278: WSF4P_1 => WSF45P_1; Mass_Action_1_1(ef5p_1*Vpclnw_1, WSF4P_1);  // modifiers: Vpclnw_1

  // Events:
  at (CLB2_1 + CLB5_1 - KEZ2_1 < 0): ORI_1 = 0, ORIFLAG_1 = 1;
  at (WHI5cycf_1 > 0.5): Twhi5_1 = TCYCLE_1, Mwhi5_1 = MASS_1;
  at (BUD_1 > 1): TBUD_1 = TCYCLE_1, MBUD_1 = MASS_1;
  at (ORI_1 - 1 > 0): TORI_1 = TCYCLE_1*ORIFLAG_1, UDNA_1 = 1*ORIFLAG_1, MAD2_1 = mad2h_1*ORIFLAG_1 + mad2l_1*(1 - ORIFLAG_1), BUB2_1 = bub2h_1*ORIFLAG_1 + bub2l_1*(1 - ORIFLAG_1);
  at (TCYCLE_1 - TORI_1 - DNATIMER_1 > 0): REPDNA_1 = UDNA_1, SACOFF_1 = SPNALIGN_1*ORIFLAG_1, UDNA_1 = 0, ORIFLAG_1 = 0;
  at (TCYCLE_1 - TORI_1 - DNATIMER_1 > 0): MAD2_1 = mad2l_1*SACOFF_1 + mad2h_1*(1 - SACOFF_1), BUB2_1 = bub2l_1*SACOFF_1 + bub2h_1*(1 - SACOFF_1), LTE1_1 = lte1h_1*SACOFF_1 + lte1l_1*(1 - SACOFF_1);
  at (SPN_1 - 1 > 0): SPNALIGN_1 = 1, TSPN_1 = TCYCLE_1, SACOFF_1 = REPDNA_1, MitCat_1 = piecewise(1, ESP1_1 > 0.1, 0);
  at (SPN_1 - 1 > 0): MAD2_1 = mad2l_1*SACOFF_1 + mad2h_1*(1 - SACOFF_1), BUB2_1 = bub2l_1*SACOFF_1 + bub2h_1*(1 - SACOFF_1), LTE1_1 = lte1h_1*SACOFF_1 + lte1l_1*(1 - SACOFF_1);
  at (CLB2_1 - KEZ_1 < 0): MASS_1 = F_1*MASS_1*REPDNA_1 + MASS_1*(1 - REPDNA_1), LTE1_1 = lte1l_1*REPDNA_1 + LTE1_1*(1 - REPDNA_1), BUD_1 = 0 + BUD_1*(1 - REPDNA_1), SPN_1 = 0 + SPN_1*(1 - REPDNA_1), TORI_1 = 1000 + TORI_1*(1 - REPDNA_1), TSPN_1 = 0 + TSPN_1*(1 - REPDNA_1), TBUD_1 = 0 + TBUD_1*(1 - REPDNA_1), Twhi5_1 = 0 + Twhi5_1*(1 - REPDNA_1), MBUD_1 = 0 + MBUD_1*(1 - REPDNA_1), Mwhi5_1 = 0 + Mwhi5_1*(1 - REPDNA_1), TCYCLE_1 = 0, SACOFF_1 = 0, SPNALIGN_1 = 0, REPDNA_1 = 0, MASSBIRTH_1 = MASS_1;

  // Unit definitions:
  unit area = metre^2;
  unit length = metre;
  unit substance = mole;
  unit time = second;
  unit volume = litre;
end
